variable mdt string 0
variable loco string /home/jinzhen/projects/SCEMa/examples/streched_polyhedron/nanoscale_log/tmp/1-1.8.0_1
variable tempt equal 0.010000
units           real            # default

#  Setting variables/attributes associated with each atom: charge, bonds, angles,
#  dihedrals, impropers (full)
atom_style      full

#  Setting the dimension of the simulation
dimension       3               # default

#  Setting boundary types in each dimension (periodic)
boundary        p p p

# Choose potential
pair_style	sw

# Setup neighbor style
neighbor 1.0 nsq
neigh_modify once no every 1 delay 0 check yes
read_restart /home/jinzhen/projects/SCEMa/examples/streched_polyhedron/nanoscale_output/init.g0_1.bin
